// SBML level 3 version 2

model Brusselator()

  // Compartments:
  compartment vol = 1000;

  // Species:
  species A in vol = 100000/vol;  // substance in mole
  species B in vol = 100000/vol;  // substance in mole
  species C in vol = 0;  // substance in mole
  species D in vol = 0;  // substance in mole
  species X in vol = 2000/vol;  // substance in mole
  species Y in vol = 1000/vol;  // substance in mole

  // Parameters:
  rate1 = 5000;
  rate2 = 50;
  rate3 = 5e-5;
  rate4 = 5;

  // Reactions:
  reaction1: A -> X + A; rate1;
  reaction2: B + X -> Y + C + B; rate2*X;
  reaction3: 2 X + Y -> 3 X; rate3*Y*X*(X - 1)/2;
  reaction4: X -> D; rate4*X;
end
