// SBML level 3 version 2

model Michaelis_Menten()

  // Compartments:
  compartment vol = 1;

  // Species:
  species Substrate in vol = 301/vol;  // substance in mole
  species Enzyme in vol = 120/vol;  // substance in mole
  species Enzyme_Substrate_Complex in vol = 0;  // substance in mole
  species Product in vol = 0;  // substance in mole

  // Parameters:
  rate1 = 0.0017;
  rate2 = 0.5;
  rate3 = 0.1;

  // Reactions:
  r1: Substrate + Enzyme -> Enzyme_Substrate_Complex; rate1*Substrate*Enzyme/vol;
  r2: Enzyme_Substrate_Complex -> Substrate + Enzyme; rate2*Enzyme_Substrate_Complex;
  r3: Enzyme_Substrate_Complex -> Enzyme + Product; rate3*Enzyme_Substrate_Complex;
end
