// SBML level 3 version 2

model Opioid()

  // Compartments:
  compartment vol = 1;

  // Species:
  species Susceptible in vol = 1000/vol;  // substance in mole
  species Prescribed_User in vol = 0;  // substance in mole
  species Addicted in vol = 0;  // substance in mole
  species Rehab in vol = 0;  // substance in mole
  species Natural_Deaths in vol = 0;  // substance in mole
  species Addicted_Deaths in vol = 0;  // substance in mole

  // Parameters:
  alpha = 0.15;
  epsilon = 0.8;
  beta_p = 0.00266;
  beta_a = 0.00094;
  gamma = 0.00744;
  zeta = 0.2;
  delta = 0.1;
  sigma = 0.9;
  mu = 0.00729;
  mu_prime = 0.01159;

  // Reactions:
  SP: Susceptible -> Prescribed_User; alpha*Susceptible;
  SA_a: Susceptible -> Addicted; beta_a*Susceptible;
  SA_p: Susceptible -> Addicted; beta_p*Susceptible;
  PA: Prescribed_User -> Addicted; gamma*Prescribed_User;
  PS: Prescribed_User -> Susceptible; epsilon*Prescribed_User;
  AR: Addicted -> Rehab; zeta*Addicted;
  RA: Rehab -> Addicted; delta*Rehab;
  RS: Rehab -> Susceptible; sigma*Rehab;
  mu_S: Susceptible -> Susceptible + Natural_Deaths; mu*Susceptible;
  mu_P: Prescribed_User -> Susceptible + Natural_Deaths; mu*Prescribed_User;
  mu_R: Rehab -> Susceptible + Natural_Deaths; mu*Rehab;
  mu_prime_A: Addicted -> Susceptible + Addicted_Deaths; mu_prime*Addicted;
end
