// SBML level 3 version 2

model Oregonator()

  // Compartments:
  compartment vol = 1;

  // Species:
  species F in vol = 2/vol;  // substance in mole
  species A in vol = 250/vol;  // substance in mole
  species B in vol = 500/vol;  // substance in mole
  species C in vol = 1000/vol;  // substance in mole
  species P in vol = 0;  // substance in mole

  // Parameters:
  k1 = 2;
  k2 = 0.1;
  k3 = 104;
  k4 = 4e-7;
  k5 = 26;

  // Reactions:
  reaction1: B + F -> A + F; k1*B*F/vol;
  reaction2: A + B -> P; k2*A*B/vol;
  reaction3: A + F -> 2 A + C + F; k3*A*F/vol;
  reaction4: 2 A -> P; 0.5*k4*A*(A - 1)/vol;
  reaction5: C + F -> B + F; k5*C*F/vol;
end
