// SBML level 3 version 2

model Vilar_Oscillator()

  // Compartments:
  compartment c = 1;

  // Species:
  species Da in c = 1/c;  // substance in mole
  species Da_prime in c = 0;  // substance in mole
  species Ma in c = 0;  // substance in mole
  species Dr in c = 1/c;  // substance in mole
  species Dr_prime in c = 0;  // substance in mole
  species Mr in c = 0;  // substance in mole
  species C in c = 10/c;  // substance in mole
  species A in c = 10/c;  // substance in mole
  species R in c = 10/c;  // substance in mole

  // Parameters:
  alpha_a = 50;
  alpha_a_prime = 500;
  alpha_r = 0.01;
  alpha_r_prime = 50;
  beta_a = 50;
  beta_r = 5;
  delta_ma = 10;
  delta_mr = 0.5;
  delta_a = 1;
  delta_r = 0.2;
  gamma_a = 1;
  gamma_r = 1;
  gamma_c = 2;
  theta_a = 50;
  theta_r = 100;

  // Reactions:
  r1: Da_prime -> Da; theta_a*Da_prime;
  r2: Da + A -> Da_prime; gamma_a*Da*A;
  r3: Dr_prime -> Dr; theta_r*Dr_prime;
  r4: Dr + A -> Dr_prime; gamma_r*Dr*A;
  r5: Da_prime -> Da_prime + Ma; alpha_a_prime*Da_prime;
  r6: Da -> Da + Ma; alpha_a*Da;
  r7: Ma -> ; delta_ma*Ma;
  r8: Ma -> A + Ma; beta_a*Ma;
  r9: Da_prime -> Da_prime + A; theta_a*Da_prime;
  r10: Dr_prime -> Dr_prime + A; theta_a*Dr_prime;
  r11: A -> ; gamma_c*A;
  r12: A + R -> C; gamma_c*A*R;
  r13: Dr_prime -> Dr_prime + Mr; alpha_r_prime*Dr_prime;
  r14: Dr -> Dr + Mr; alpha_r*Dr;
  r15: Mr -> ; delta_mr*Mr;
  r16: Mr -> Mr + R; beta_r*Mr;
  r17: R -> ; delta_r*R;
  r18: C -> R; delta_a*C;
end
