// SBML level 3 version 2

model Brusselator()

  // Compartments:
  compartment c = 1;

  // Species:
  species A in c = 100000/c;  // substance in mole
  species B in c = 100000/c;  // substance in mole
  species C in c = 0;  // substance in mole
  species D in c = 0;  // substance in mole
  species X in c = 2000/c;  // substance in mole
  species Y in c = 1000/c;  // substance in mole

  // Parameters:
  rate1 = 5000;
  rate2 = 50;
  rate3 = 5e-5;
  rate4 = 5;

  // Reactions:
  reaction1: A -> X + A; rate1;
  reaction2: B + X -> Y + C + B; rate2*X;
  reaction3: 2 X + Y -> 3 X; rate3*Y*X*(X - 1)/2;
  reaction4: X -> D; rate4*X;
end
