// SBML level 3 version 2

model Oregonator()

  // Compartments:
  compartment c = 1;

  // Species:
  species F in c = 2/c;  // substance in mole
  species A in c = 250/c;  // substance in mole
  species B in c = 500/c;  // substance in mole
  species C in c = 1000/c;  // substance in mole
  species P in c = 0;  // substance in mole

  // Parameters:
  k1 = 2;
  k2 = 0.1;
  k3 = 104;
  k4 = 4e-7;
  k5 = 26;

  // Reactions:
  reaction1: B + F -> A + F; k1*B*F;
  reaction2: A + B -> P; k2*A*B;
  reaction3: A + F -> 2 A + C + F; k3*A*F;
  reaction4: 2 A -> P; k4*A*A;
  reaction5: C + F -> B + F; k5*C*F;
end
